# Определение модуля зацепления:
K_m := 1.4  # - коэф. типа профиля зуба, для прямозубых колес
# Y_F | - коэф. формы зуба
K_β := 1.3  # - коэф. неравномерности нагрузки по ширине колеса 1..1.3
ψ_bm
# - коэф. ширины зубчатого венца 3..16
ψ_bmк := 7
ψ_bmш := 10
[σ_F]  # - допуск. напряжение изгиба МПа
# __________________________________________________________________________
# Сталь 35 - колесо | Сталь 45 - шестерня
# Коэф. лин. расшир.
#
# Плотность
#
# Предел прочности
#
# Предел выносливости
#
# Твердость HB
#
# Термообработка
α := 10.6 .. 12.4*10^-6
1/C
ρ := 7850  # кг/м^3
σ_вк := 520
σ_вш := 580  # МПа
σ_1к := 250
σ_1ш := 280  # МПа
196 .. 263
190 .. 240
# Нормализация, закалка, отпуск
# __________________________________________________________________________
n_зп := 1.5  # - коэф. запаса прочности 1.5..2.0
250/1.5 = 166.667
σ_Fк := 167
280/1.5 = 186.667
σ_Fш := 187
M_IV := 22
M_III := 2.82
M_II := 0.3615
M_I := 0.0463
Y_Fк56 := 3.73
Y_Fш56 := 4.15
Y_Fк56/σ_Fк = 0.0223353
Y_Fш56/σ_Fш = 0.0221925
z_6 := 18
m_р56 := K_m*nthroot(M_IV*10^3*K_β*Y_Fк56/(z_6*ψ_bmк*σ_Fк), 3) = 2.40505  # мм
m_р56 := K_m*nthroot(M_IV*10^3*K_β*Y_Fш56/(z_6*ψ_bmш*σ_Fш), 3) = 2.13089  # мм
Y_Fк34 := 3.73
Y_Fш34 := 4.15
Y_Fк34/σ_Fк = 0.0223353
Y_Fш34/σ_Fш = 0.0221925
z_4 := 54
m_р34 := K_m*nthroot(M_IV*10^3*K_β*Y_Fк34/(z_4*ψ_bmк*σ_Fк), 3) = 1.66757  # мм
Y_Fк12 := 3.73
Y_Fш12 := 4.15
Y_Fк12/σ_Fк = 0.0223353
Y_Fш12/σ_Fш = 0.0221925
z_2 := 126
m_р12 := K_m*nthroot(M_IV*10^3*K_β*Y_Fк12/(z_2*ψ_bmк*σ_Fк), 3) = 1.25726  # мм
m_56 := 2.5
m_34 := 2.5
m_12 := 2.5
# Геометрический расчет кинематики
# d_f | - диаметр впадин
# d | - делительный диаметр
# b_2 | - ширина колеса
# d_a | - диаметр вершин зубьев
# a | - делительное межосевое расст.
# с* - коэф. радиал. зазора, = 0.5 и 0.35 при m <= 0.5  и  > 0.5 соотв.
z_1 := 18
m_12 = 2.5
d_1 := m_12*z_1 = 45
d_a1 := m_12*(z_1 + 2) = 50
d_f1 := m_12*(z_1 - 2*(1 + 0.35)) = 38.25
b_1 := ψ_bmш*m_12 = 25
b'_1 := 6
z_2 := 54
m_12 = 2.5
d_2 := m_12*z_2 = 135
d_a2 := m_12*(z_2 + 2) = 140
d_f2 := m_12*(z_2 - 2*(1 + 0.35)) = 128.25
b_2 := ψ_bmк*m_12 = 17.5
a_12 := m_12*(z_1 + z_2)/2 = 90
z_4 := 126
m_34 = 2.5
d_4 := m_34*z_4 = 315
d_a4 := m_34*(2 + z_4) = 320
d_f4 := m_34*(z_4 - 2*(1 + 0.35)) = 308.25
b_4 := ψ_bmк*m_34 = 17.5
a_34 := m_34*(z_2 + z_4)/2 = 225
